// SBML level 3 version 1

model repressorRebinding()
  // model units - substance: item, time: second, volume: litre, extent: item

  // Compartments:
  compartment reactionVolume = 8.99e-17;

  // Species:
  substanceOnly species O in cell = 1;
  substanceOnly species R2 in cell = 7;
  substanceOnly species R2O in cell = 0;
  substanceOnly species R2E in cell = 0;

  // Reactions:
  R2_binding: R2 + O => R2O; kron*R2*O/(avogadro*reactionVolume);
    kron = 2.43e6 per_molar_per_second;
  R2_escape: R2 => R2E; k*R2;
    k = 1e8 per_second;

  // Unit definitions:
  unit per_second = 1 / second;
  unit per_item_per_second = 1 / (item * second);
  unit per_molar_per_second = litre / (mole * second);
end
